# Пример 1.3 | Пример 1.10
φ := 0, 0.1*π .. 3.5*π
R := 5, 5.5 .. 10
x(φ) := sin(φ)
S(R) := π*R^2
y(φ) := 2^(-0.6*φ)
R = [5; 5.5; 6; 6.5; 7; 7.5; 8; 8.5; 9; 9.5; 10]
S(R) = [78.5398; 95.0332; 113.097; 132.732; 153.938; 176.715; 201.062; 226.98; 254.469; 283.529; 314.159]
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x1 := 1
x2 := 3
x3 := 6.5
x4 := 9.3
Given
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sin(x1) == 2^(-0.6*x1)
Find(x1) = 0.79962
Given
sin(x2) == 2^(-0.6*x2)
Find(x2) = 2.82801
Given
sin(x3) == 2^(-0.6*x3)
Find(x3) = 6.35441
Given
sin(x4) == 2^(-0.6*x4)
Find(x4) = 9.40476
# Пример 1.11 | Пример 1.12
N := 25
R := 1
Sphere(α, β) := [R*sin(α)*cos(β); R*sin(α)*sin(β); R*cos(α)]
i := 0 .. N
j := 0 .. N
φ[i] := i*2*(π/N)
ζ[j] := j*2*(π/N)
H := CreateMesh(Sphere, 0, π, 0, π, 10, 10)
x[i, j] := R*sin(ζ[j])*cos(φ[i])
# [component: inputs H]
y[i, j] := R*sin(ζ[j])*sin(φ[i])
z[i, j] := R*cos(ζ[j])
# [component: inputs (x, y, z)]
# Пример 1.16
r := 15
c1 := 3
c2 := 1
a := 1/3
b := 2
b1(a, с1, с2, r) := -a*c1 + c2 + (a^2*r^2 + r^2)^(1/2)
b2(a, c1, c2, r) := -a*c1 + c2 - (a^2*r^2 + r^2)^(1/2)
g(x) := a*x + (b2(a, c1, c2, r) - 2 + (1/50)*(b1(a, c1, c2, r) + 4 - b2(a, c1, c2, r))*FRAME)
x := -10 .. 20
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