# Практическое задание 2 | Практическое задание 3 (Спираль Ферма)
φ := 0, 0.1 .. 50
a := 2
f(x) := 2*ln(x^2 - 1) + e^(-x)
x := 2, 2.1 .. 4
r(φ) := sqrt(a^2*φ)
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# Так как пересечения функции с осью абсцисс нет на заданном отрезке, функция не имеет корней уравнения
# Практическое задание 4 | Практическое задание 5
z(x, y) := e^x*cos(y)
f(i, j) := (i - 1)*(i - 2) + j*(j - 1)
matrix_order := 10
# [component: inputs z]
A := matrix(matrix_order, matrix_order, f)
A = [
    2, 2, 4, 8, 14, 22, 32, 44, 58, 74;
    0, 0, 2, 6, 12, 20, 30, 42, 56, 72;
    0, 0, 2, 6, 12, 20, 30, 42, 56, 72;
    2, 2, 4, 8, 14, 22, 32, 44, 58, 74;
    6, 6, 8, 12, 18, 26, 36, 48, 62, 78;
    12, 12, 14, 18, 24, 32, 42, 54, 68, 84;
    20, 20, 22, 26, 32, 40, 50, 62, 76, 92;
    30, 30, 32, 36, 42, 50, 60, 72, 86, 102;
    42, 42, 44, 48, 54, 62, 72, 84, 98, 114;
    56, 56, 58, 62, 68, 76, 86, 98, 112, 128
]
# Практическое задание 6
# [component: inputs A]
# [component: inputs A]
f(x) := 2*ln(x^2 - 1) + e^(-x)
x := 2, 2.1 .. 4
frame := FRAME/50
x_point := 2 + (4 - 2)*frame
y_point := f(x_point)
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# [component: inputs A]
# [component: inputs A]
# Практическое задание 7
picture := "picture.bmp"
# [component: inputs A]
mass_red := READ_RED(picture)
mass_green := READ_GREEN(picture)
mass_blue := READ_BLUE(picture)
# [component: inputs (mass_red, mass_green, mass_blue)]
