# Пример 2.1
x1 := -1
y1 := -1
x2 := 1
y2 := 1
k := (y2 - y1)/(x2 - x1)
k = 1
r := sqrt((x2 - x1)^2 + (y2 - y1)^2)
L(x) := k*(x - x1) + y1
r = 2.82843
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# Пример 2.3
x1 := -1
y1 := -1
x2 := 1
y2 := 1
x3 := -1
y3 := 1
P1(x, y) := [x1; y1; 0]
P2(x, y) := [x2; y2; 0]
P3(x, y) := [x3; y3; 0]
T1 := CreateMesh(P1, x1, x1, y1, y1)
T2 := CreateMesh(P2, x2, x2, y2, y2)
T3 := CreateMesh(P3, x3, x3, y3, y3)
Ln12(u, v) := [x1 + (x2 - x1)*u; y1 + (y2 - y1)*u; 0]
Ln34(u, v) := P3(u, v) + [(x2 - x1)*u; (y2 - y1)*u; 0]
L12 := CreateMesh(Ln12, 0, 1, 0, 0)
L34 := CreateMesh(Ln34, 0, 1, 0, 0)
P4(u, v) := Ln34(1, 0)
T4 := CreateMesh(P4, 1, 1, 0, 0)
# [component: inputs T1, T2, T3, T4, L12, L34]
# Пример 2.4
x1 := -1
y1 := -1
x2 := 1
y2 := 1
k := (y2 - y1)/(x2 - x1)
k = 1
L(x) := k*(x - x1) + y1
x3 := -1
y3 := 1
x4 := 1
y4 := -2
k2 := (y4 - y3)/(x4 - x3)
k2 = -1.5
L2(x) := k2*(x - x3) + y3
L(x) == L2(x) solve, x → -1/5
a := -1/5
L(a) = -0.2
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# Пример 2.5
x1 := -1
y1 := -1
x2 := 1
y2 := 1
x3 := 5
y3 := 0
P1(x, y) := [x1; y1; 0]
P2(x, y) := [x2; y2; 0]
P3(x, y) := [x3; y3; 0]
T1 := CreateMesh(P1, x1, x1, y1, y1)
T2 := CreateMesh(P2, x2, x2, y2, y2)
T3 := CreateMesh(P3, x3, x3, y3, y3)
p1 := [x1; y1; 0]
p2 := [x2; y2; 0]
p3 := [x3; y3; 0]
n1 := (p2 - p1)/|p2 - p1|
ln1(t) := p1 + t*n1
(ln1(t) - p3)*n1 == 0 solve, t → 7*sqrt(2)/2
p4 := ln1(7*sqrt(2)/2)
p4 = [2.5; 2.5; 0]
P4(x, y) := [2.5; 2.5; 0]
T4 := CreateMesh(P4, 1, 1, 0, 0)
G(u, v) := p3 + u*(p3 - p4)
perpend := CreateMesh(G, -10, 10, 10, 50)
lnnl(u, v) := p1 + u*n1
lin1 := CreateMesh(lnnl, -10, 10, 10, 50)
# [component: inputs T1, T2, T3, T4, lnnl, perpend]
