# Задание 2
x1 := 2
y1 := 10
x2 := 10
y2 := 9
x3 := 15
y3 := 11
x4 := 4
y4 := 4
x5 := 9
y5 := 15
P1(x, y) := [x1; y1; 0]
P2(x, y) := [x2; y2; 0]
P3(x, y) := [x3; y3; 0]
P4(x, y) := [x4; y4; 0]
P5(x, y) := [x5; y5; 0]
T1 := CreateMesh(P1, x1, x1, y1, y1)
T2 := CreateMesh(P2, x2, x2, y2, y2)
T3 := CreateMesh(P3, x3, x3, y3, y3)
T4 := CreateMesh(P4, x4, x4, y4, y4)
T5 := CreateMesh(P5, x5, x5, y5, y5)
Ln14(u, v) := [x1 + (x4 - x1)*u; y1 + (y4 - y1)*u; 0]
Ln15(u, v) := [x1 + (x5 - x1)*u; y1 + (y5 - y1)*u; 0]
Ln35(u, v) := [x3 + (x5 - x3)*u; y3 + (y5 - y3)*u; 0]
Ln23(u, v) := [x2 + (x3 - x2)*u; y2 + (y3 - y2)*u; 0]
Ln24(u, v) := [x2 + (x4 - x2)*u; y2 + (y4 - y2)*u; 0]
L14 := CreateMesh(Ln14, 0, 1, 0, 0)
L15 := CreateMesh(Ln15, 0, 1, 0, 0)
L35 := CreateMesh(Ln35, 0, 1, 0, 0)
L23 := CreateMesh(Ln23, 0, 1, 0, 0)
L24 := CreateMesh(Ln24, 0, 1, 0, 0)
# [component: inputs L14, L15, L35, L23, L24, T1, T2, T3, T4, T5]
# Задание 3
x_15_center := (x1 + x5)/2
x_23_center := (x2 + x3)/2
x_24_center := (x2 + x4)/2
y_15_center := (y1 + y5)/2
y_23_center := (y2 + y3)/2
y_24_center := (y2 + y4)/2
P15_triangle(x, y) := [x_15_center; y_15_center; 0]
P23_triangle(x, y) := [x_23_center; y_23_center; 0]
P24_triangle(x, y) := [x_24_center; y_24_center; 0]
T15_triangle := CreateMesh(P15_triangle, x_15_center, x_15_center, y_15_center, y_15_center)
T23_triangle := CreateMesh(P23_triangle, x_23_center, x_23_center, y_23_center, y_23_center)
T24_triangle := CreateMesh(P24_triangle, x_24_center, x_24_center, y_24_center, y_24_center)
Ln1_triangle(u, v) := [x_15_center + (x_23_center - x_15_center)*u; y_15_center + (y_23_center - y_15_center)*u; 0]
Ln2_triangle(u, v) := [x_23_center + (x_24_center - x_23_center)*u; y_23_center + (y_24_center - y_23_center)*u; 0]
Ln3_triangle(u, v) := [x_15_center + (x_24_center - x_15_center)*u; y_15_center + (y_24_center - y_15_center)*u; 0]
L1_triangle := CreateMesh(Ln1_triangle, 0, 1, 0, 0)
L2_triangle := CreateMesh(Ln2_triangle, 0, 1, 0, 0)
L3_triangle := CreateMesh(Ln3_triangle, 0, 1, 0, 0)
# [component: inputs L14, L15, L35, L23, L24, L1_triangle, L2_triangle, L3_triangle, T1, T2, T3, T4, T5, T15_triangle, T23_triangle, T24_triangle]
# Задание 4
# Формула неявного уравнения, заданного способом двух точек: (x-ax)/(bx-ax)=(y-ay)/(by-ay)
(x - x_15_center)/(x_23_center - x_15_center) == (y - y_15_center)/(y_23_center - x_15_center)
(x - x_15_center)/(x_24_center - x_15_center) == (y - y_15_center)/(y_24_center - x_15_center)
(x - x_23_center)/(x_24_center - x_23_center) == (y - y_23_center)/(y_24_center - x_23_center)
(x - 5.5)/(12.5 - 5.5) == (y - 12.5)/(10 - 12.5)
(x - 12.5)/(7 - 12.5) == (y - 10)/(6.5 - 10)
(x - 5.5)/(7 - 5.5) == (y - 12.5)/(6.5 - 12.5)
(x - 5.5)/7 == (y - 12.5)/(-2.5)
(x - 5.5)/1.5 == (y - 12.5)/(-6)
(x - 12.5)/(-5.5) == (y - 10)/(-3.5)
-2.5*x + 101.25 == 7*y
-6*x + 51 == 1.5*y
3.5*x + 11.25 == 5.5*y
# Формула параметрического уравнения, заданного способом двух точек:
x_2_4(t) := x_15_center + (x_24_center - x_15_center)*t
x_3_4(t) := x_23_center + (x_24_center - x_23_center)*t
x_1_4(t) := x_15_center + (x_23_center - x_15_center)*t
y_1_4(t) := y_15_center + (y_23_center - y_15_center)*t
y_2_4(t) := y_15_center + (y_24_center - y_15_center)*t
y_3_4(t) := y_23_center + (y_24_center - y_23_center)*t
# Задание 5
y_1_5(x) := (-2.5*x + 101.25)/7
y_2_5(x) := -4*x + 34
y_3_5(x) := (3.5*x + 11.25)/5.5
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# Задание 6
Line_param_1(t, v) := [x_1_4(t); y_1_4(t); 0]
Line_param_2(t, v) := [x_2_4(t); y_2_4(t); 0]
Line_param_3(t, v) := [x_3_4(t); y_3_4(t); 0]
L_param_1 := CreateMesh(Line_param_1, 0, 1, 0, 0)
L_param_2 := CreateMesh(Line_param_2, 0, 1, 0, 0)
L_param_3 := CreateMesh(Line_param_3, 0, 1, 0, 0)
# [component: inputs L_param_1, L_param_2, L_param_3]
# Задание 7
Ln_parallel(u, v) := P1(u, v) + [(x4 - x3)*u; (y4 - y3)*u; 0]
T_parallel := CreateMesh(Ln_parallel, -0.5, 0.5, 0, 0)
P1_parallel(u, v) := Ln_parallel(0.5, 0)
P2_parallel(u, v) := Ln_parallel(-0.5, 0)
# [component: inputs L14, L15, L35, L23, L24, T_parallel, P1_parallel, P2_parallel]
# Задание 8
Line23_8(u, v) := [x2 + (x3 - x2)*u; y2 + (y3 - y2)*u; 0]
Line45_8(u, v) := [x4 + (x5 - x4)*u; y4 + (y5 - y4)*u; 0]
L23_8 := CreateMesh(Line23_8, -2, 1, 0, 0)
L45_8 := CreateMesh(Line45_8, 0, 1, 0, 0)
k23_8 := (y3 - y2)/(x3 - x2)
k45_8 := (y5 - y4)/(x5 - x4)
Ln23_8(x) := k23_8*(x - x2) + y2
Ln45_8(x) := k45_8*(x - x4) + y4
Ln23_8(x) == Ln45_8(x) solve, x → 49/9
x6 := 49/9
y6 := Ln23_8(x6)
y6 = 7.17778
P6_8(x, y) := [x6; y6; 0]
T6_8 := CreateMesh(P6_8, x6, x6, y6, y6)
# [component: inputs L14, L15, L35, L23, L24, L23, L23_8, L45_8, T6_8]
# Задание 9
Ln34_9(u, v) := [x3 + (x4 - x3)*u; y3 + (y4 - y3)*u; 0]
L34_9 := CreateMesh(Ln34_9, 0, 1.5, 0, 0)
p1 := [x1; y1; 0]
p3 := [x3; y3; 0]
p4 := [x4; y4; 0]
n34_9 := (p4 - p3)/|p4 - p3|
Line34_9(t) := t*n34_9 + p3
(Line34_9(t) - p1)*n34_9 == 0 solve, t → 15*sqrt(170)/17
p_on_Line34 := Line34_9(15*sqrt(170)/17)
p_on_Line34 = [5.29412; 4.82353; 0]
P_sem(x, y) := [5.294; 4.824; 0]
T_on_Line34 := CreateMesh(P_sem, 1, 1, 0, 0)
Line_perpend(u, v) := p1 + u*(p1 - p_on_Line34)
L_perpend := CreateMesh(Line_perpend, -2, 0, 0, 0)
P_sim(u, v) := Line_perpend(-2, 0)
T_sim := CreateMesh(P_sim, -2, 0, 0, 0)
# [component: inputs L14, L15, L35, L23, L24, L34_9, T_on_Line34, L_perpend, T_sim, T1]
