# Пример 3.1. | Пример 3.2.
x0 := 1
x1 := 2
a1x0 := 1
b1x0 := 10
a2x0 := 2
b2x0 := 1
y0 := 2
y1 := 1
a1y0 := 1
b1y0 := 10
a2y0 := 1
b2y0 := 15
z0 := 3
z1 := 2
a1z0 := 1
b1z0 := 10
a2z0 := 4
b2z0 := 6
T1(x, y) := [x0; y0; z0]
T2(x, y) := [x1; y1; z1]
A1 := [a1x0; a1y0; a1z0]
B1 := [b1x0; b1y0; b1z0]
A2 := [a2x0; a2y0; a2z0]
B2 := [b2x0; b2y0; b2z0]
n1 := (B1 - A1)/|B1 - A1|
n2 := (B2 - A2)/|B2 - A2|
Line(u, v) := [x0 + (x1 - x0)*u; y0 + (y1 - y0)*u; z0 + (z1 - z0)*u]
f1(t) := A1 + t*n1
f2(t) := A2 + t*n2
LineExample1 := CreateMesh(Line, 0, 1, 0, 0)
t1 := 0
t2 := 0
# [component: inputs T1, T2, LineExample1]
Given
(f1(t1) - f2(t2))*n1 == 0
(f1(t1) - f2(t2))*n2 == 0
SExample2 := Find(t1, t2) = [3.34038; 1.68779]
t1 := SExample2[0]
P1 := f1(t1)
t2 := SExample2[1]
P2 := f2(t2)
G(t, v) := P1 + t*(P2 - P1)
Perpend := CreateMesh(G, 0, 1, 20, 0)
A1(x, y) := [a1x0; a1y0; a1z0]
B1(x, y) := [b1x0; b1y0; b1z0]
A2(x, y) := [a2x0; a2y0; a2z0]
B2(x, y) := [b2x0; b2y0; b2z0]
Line1(u, v) := [a1x0 + (b1x0 - a1x0)*u; a1y0 + (b1y0 - a1y0)*u; a1z0 + (b1z0 - a1z0)*u]
Line2(u, v) := [a2x0 + (b2x0 - a2x0)*u; a2y0 + (b2y0 - a2y0)*u; a2z0 + (b2z0 - a2z0)*u]
LineExample2_1 := CreateMesh(Line1, 0, 1, 0, 0)
LineExample2_2 := CreateMesh(Line2, 0, 1, 0, 0)
# [component: inputs LineExample2_1, LineExample2_2, A1, B1, A2, B2, Perpend]
# Пример 3.3.
pExample3_1 := [0, 0, 1]
pExample3_2 := [1, 0, 0]
pExample3_3 := [1, 1, 1]
plate_equal(x, y, z) := det([
    x - pExample3_1[0], y - pExample3_1[1], z - pExample3_1[2];
    pExample3_2[0] - pExample3_1[0], pExample3_2[1] - pExample3_1[1], pExample3_2[2] - pExample3_1[2];
    pExample3_3[0] - pExample3_1[0], pExample3_3[1] - pExample3_1[1], pExample3_3[2] - pExample3_1[2]
])
det(plate_equal(x, y, z)) == 0
det == (x - pExample3_1[0])*(pExample3_2[1] - pExample3_1[1])*(pExample3_3[2] - pExample3_1[2]) + (z - pExample3_1[2])*(pExample3_2[0] - pExample3_1[0])*(pExample3_3[1] - pExample3_1[1]) + (pExample3_3[0] - pExample3_1[0])*(y - pExample3_1[1])*(pExample3_2[2] - pExample3_1[2])
-(z - pExample3_1[2])*(pExample3_2[1] - pExample3_1[1])*(pExample3_3[0] - pExample3_1[0]) - (x - pExample3_1[0])*(pExample3_3[1] - pExample3_1[1])*(pExample3_2[2] - pExample3_1[2]) - (pExample3_3[2] - pExample3_1[2])*(y - pExample3_1[1])*(pExample3_2[0] - pExample3_1[0]) == x - y + z - 1
# Уравнение плоскости:
# x - y + z - 1
