# Задание 2
x1 := 6
x2 := 11
x3 := 8
x4 := 15
y1 := 3
y2 := 17
y3 := 1
y4 := 19
z1 := 7
z2 := 18
z3 := 7
z4 := 8
T1(x, y) := [x1; y1; z1]
T2(x, y) := [x2; y2; z2]
T3(x, y) := [x3; y3; z3]
T4(x, y) := [x4; y4; z4]
Line12(u, v) := [x1 + (x2 - x1)*u; y1 + (y2 - y1)*u; z1 + (z2 - z1)*u]
Line13(u, v) := [x1 + (x3 - x1)*u; y1 + (y3 - y1)*u; z1 + (z3 - z1)*u]
Line14(u, v) := [x1 + (x4 - x1)*u; y1 + (y4 - y1)*u; z1 + (z4 - z1)*u]
L12 := CreateMesh(Line12, 0, 1, 0, 0)
L13 := CreateMesh(Line13, 0, 1, 0, 0)
L14 := CreateMesh(Line14, 0, 1, 0, 0)
Line23(u, v) := [x2 + (x3 - x2)*u; y2 + (y3 - y2)*u; z2 + (z3 - z2)*u]
Line24(u, v) := [x2 + (x4 - x2)*u; y2 + (y4 - y2)*u; z2 + (z4 - z2)*u]
Line34(u, v) := [x3 + (x4 - x3)*u; y3 + (y4 - y3)*u; z3 + (z4 - z3)*u]
L23 := CreateMesh(Line23, 0, 1, 0, 0)
L24 := CreateMesh(Line24, 0, 1, 0, 0)
L34 := CreateMesh(Line34, 0, 1, 0, 0)
# [component: inputs T1, T2, T3, T4, L12, L13, L14, L23, L24, L34]
# Задание 3 | Задание 4
T1_task3 := [x1; y1; z1]
T2_task3 := [x2; y2; z2]
T3_task3 := [x3; y3; z3]
T4_task3 := [x4; y4; z4]
T1_task4 := [x1; y1; z1]
T3_task4 := [x3; y3; z3]
d13 := T3_task4 - T1_task4
n23 := (T3_task3 - T2_task3)/|T3_task3 - T2_task3| = [-0.152696; -0.814379; -0.559885]
f23_task3(t) := T2_task3 + t*n23
paral_task4(u, v) := [T4(u, v)[0] + u*d13[0]; T4(u, v)[1] + u*d13[1]; T4(u, v)[2] + u*d13[2]]
n14 := (T4_task3 - T1_task3)/|T4_task3 - T1_task3| = [0.489535; 0.870285; 0.0543928]
f14_task3(t) := T1_task3 + t*n14
Paral_task4 := CreateMesh(paral_task4, -0.5, 0.5, 0, 0)
# [component: inputs T1, T2, T3, T4, L12, L13, L14, L23, L24, L34, Paral_task4]
t23 := 0
t14 := 0
Given
(f23_task3(t23) - f14_task3(t14))*n23 == 0
(f23_task3(t23) - f14_task3(t14))*n14 == 0
Stask3 := Find(t23, t14) = [17.5623; 0.935272]
t23_task3 := Stask3[0]
t14_task3 := Stask3[1]
P23 := f23_task3(t23_task3)
P14 := f14_task3(t14_task3)
G_task3(t, v) := P23 + t*(P14 - P23)
Perpend := CreateMesh(G_task3, 0, 1, 0, 0)
# [component: inputs T1, T2, T3, T4, L12, L13, L14, L23, L24, L34, Perpend]
# Задание 5
matrix_equal_task5(x, y, z) := det([x - x2, y - y2, z - z2; x3 - x2, y3 - y2, z3 - z2; x4 - x2, y4 - y2, z4 - z2])
matrix_equal_task5(x, y, z) == 0 solve, z → 37*y/29 - 91*x/29 + 894/29
z_task5(x, y) := 37*y/29 - 91*x/29 + 894/29
Plane_task5(x, y) := [x; y; z_task5(x, y)]
plane_task5 := CreateMesh(Plane_task5, 0, 20, 20, 0)
# [component: inputs T1, T2, T3, T4, L12, L13, L14, L23, L24, L34, plane_task5]
# Задание 6
T2_task6 := [x2; y2; z2]
T3_task6 := [x3; y3; z3]
n23_task6 := (T3_task6 - T2_task6)/|T3_task6 - T2_task6| = [-0.152696; -0.814379; -0.559885]
plane_equal_task6(x, y, z) := n23_task6[0]*(x - T2_task6[0]) + n23_task6[1]*(y - T2_task6[1]) + n23_task6[2]*(z - T2_task6[2])
plane_equal_task6(x, y, z) == 0 solve, z → 45.7272727273 - 1.45454545455*y - 0.272727272727*x
z_task6(x, y) := 45.7272727273 - 1.45454545455*y - 0.272727272727*x
Plate_task6(x, y) := [x; y; z_task6(x, y)]
plate_task6 := CreateMesh(Plate_task6, 10, 30, 25, 0)  # Задание 7
# [component: inputs T1, T2, T3, T4, L12, L13, L14, L23, L24, L34, plate_task6]
T2_task7 := [x2; y2; z2]
T3_task7 := [x3; y3; z3]
T4_task7 := [x4; y4; z4]
V23_task7 := (T3_task7 - T2_task7)/|T3_task7 - T2_task7| = [-0.152696; -0.814379; -0.559885]
W24_task7 := (T4_task7 - T2_task7)/|T4_task7 - T2_task7| = [0.365148; 0.182574; -0.912871]
plane_equal_task7(t, r) := T2_task7 + V23_task7*t + W24_task7*r
plate_task_task7 := CreateMesh(plane_equal_task7, 25, -5, 12, -2)
# [component: inputs T1, T2, T3, T4, L12, L13, L14, L23, L24, L34, plate_task_task7]
# Задание 8 | Задание 9
A_task8 := 6
C_task8 := 7
hx := 8
hy := 1
hz := 7
B_task8 := 3
D_task8 := 11
# Неявное уравнение плоскости:
# Каноническое неявное уравнение, которое определяет плоскость:
x/hx + y/hy + z/hz - 1 == 0
Ax + By + Cz + D == 0
plate_equal_task8(x, y, z) := 6*x + 3*y + 7*z + 11
plate_equal_task9(x, y, z) := x/8 + y/1 + z/7 - 1
plate_equal_task8(x, y, z) == 0 solve, z → -6*x/7 - 3*y/7 - 11/7
plate_equal_task9(x, y, z) == 0 solve, z → 7 - 7*y - 7*x/8
z_task8(x, y) := -6*x/7 - 3*y/7 - 11/7
z_task9(x, y) := 7 - 7*y - 7*x/8
Plane_task8(x, y) := [x; y; z_task8(x, y)]
Plane_task9(x, y) := [x; y; z_task9(x, y)]
plane_task8 := CreateMesh(Plane_task8, 0, 10, 10, 0)
plane_task9 := CreateMesh(Plane_task9, 0, 10, 10, 0)
# [component: inputs plane_task8]
# [component: inputs plane_task9]
