# Пример 4.3. | Пример 4.4.
x0 := 1
y0 := 2
z0 := 3
O := [1; 2; 3]
P1 := [5; 4; 6]
P2 := [3; 2; 3]
x1 := 2
y1 := 1
z1 := 2
x2 := 3
y2 := 3
z2 := 1
n1 := (P1 - O)/|P1 - O|
n2 := (P2 - O)/|P2 - O|
T40(x, y) := [x0; y0; z0]
T41(x, y) := [x1; y1; z1]
T42(x, y) := [x2; y2; z2]
Σ(t1, t2) := O + t1*n1 + t2*n2
Plane := CreateMesh(Σ, -5, 5, -5, 5, 40, 40)
det([x0, x1, x2; y0, y1, y2; z0, z1, z2]) = 12
det([x - x0, y - y0, z - z0; x1 - x0, y1 - y0, z1 - z0; x2 - x0, y2 - y0, z2 - z0]) → 3*x + 3*z - 12
T := [-1; 3; 6]
T1 := [2; 1; 1]
3*x + 3*z - 12 == 0 solve, z → 4 - x
n := (T1 - T)/|T1 - T|
L(t) := T + t*n
p1 := -1
p2 := 0
p3 := -1
p4 := 4
line_equal(u, v) := [T[0] + (T1[0] - T[0])*u; T[1] + (T1[1] - T[1])*u; T[2] + (T1[2] - T[2])*u]
z(x, y) := (p1*x + p2*y + p4)/(-p3)
Line := CreateMesh(line_equal, -0.15, 1.5, 0, 0)
# [component: inputs Plane, Line]
Plane4(x, y) := [x; y; z(x, y)]
P4 := CreateMesh(Plane4, 0, 6, 0, 6, 7, 6)
(n1×n2)*n = 0.120495
x3 := 3
y3 := 3
z3 := 8
p1*(xx - x3) + p2*(yy - y3) + p3*(zz - z3) == 0 solve, zz → 11 - xx
Plane42(xx, yy) := [xx; yy; 11 - xx]
T43(x, y) := [x3; y3; z3]
P42 := CreateMesh(Plane42, 0, 6, 0, 6, 7, 6)
# Случай 1
# [component: inputs P4, T40, T41, T42, T43, P42]
v0 := [0; 0; 0]
C := v0
h := 0
Given
(C - O)*(n1×n2) == 0
(C - L(h))*n == 0
C == L(h)
S1 := Find(C, h)
S1 = [[1.25; 1.5; 2.25]; 4.62331]
V := S1[0]
V = [1.25; 1.5; 2.25]  # Пример 4.5.
x1 := 5
y1 := 0
z1 := 0
# Случай 2
x2 := 0
y2 := 5
z2 := 0
C := v0
x3 := 5
y3 := 0
z3 := 5
Given
(C - O)*(n1×n2) == 0
T1(x, y) := [x1; y1; z1]
T2(x, y) := [x2; y2; z2]
T3(x, y) := [x3; y3; z3]
(C - T)×n == v0
S2 := Find(C)
S2 = [1.25; 1.5; 2.25]
det([xx - x1, yy - y1, zz - z1; x2 - x1, y2 - y1, z2 - z1; x3 - x1, y3 - y1, z3 - z1]) → 25*xx + 25*yy - 125
# [component: inputs [(Plane, Line, S2), □, □]]
25*xx + 25*yy - 125 solve, yy → 5 - xx
Plane1(x, y) := [x; y; 4]
Plane2(xx, zz) := [xx; 5 - xx; zz]
P1 := CreateMesh(Plane1, 0, 6, 0, 6, 7, 6)
P2 := CreateMesh(Plane2, 0, 6, 0, 6, 7, 6)
# [component: inputs [(T1, T2, T3, P1, P2), □, □, □, □]]
