# Задание 2
Xa := 3
Xb := 15
Xc := 16
Xm := 4
Xn := 6
Xp := 14
Ya := 16
Yb := 9
Yc := 17
Ym := 4
Yn := 0
Yp := 0
Za := 10
Zb := 16
Zc := 9
Zm := 8
Zn := 18
Zp := 4
A(x, y) := [Xa; Ya; Za]
B(x, y) := [Xb; Yb; Zb]
C(x, y) := [Xc; Yc; Zc]
M(x, y) := [Xm; Ym; Zm]
N(x, y) := [Xn; Yn; Zn]
P(x, y) := [Xp; Yp; Zp]
LineAC(u, v) := [Xa + (Xc - Xa)*u; Ya + (Yc - Ya)*u; Za + (Zc - Za)*u]
LineAB(u, v) := [Xa + (Xb - Xa)*u; Ya + (Yb - Ya)*u; Za + (Zb - Za)*u]
LineBC(u, v) := [Xb + (Xc - Xb)*u; Yb + (Yc - Yb)*u; Zb + (Zc - Zb)*u]
LineMN(u, v) := [Xm + (Xn - Xm)*u; Ym + (Yn - Ym)*u; Zm + (Zn - Zm)*u]
Lab := CreateMesh(LineAB, 0, 1, 0, 0)
Lbc := CreateMesh(LineBC, 0, 1, 0, 0)
Lac := CreateMesh(LineAC, 0, 1, 0, 0)
Lmn := CreateMesh(LineMN, 0, 1, 0, 0)
# [component: inputs Lab, Lac, Lbc, Lmn, P, A, B, C, M, N]
# Задание 3
det([x - Xa, y - Ya, z - Za; Xb - Xa, Yb - Ya, Zb - Za; Xc - Xa, Yc - Ya, Zc - Za]) → x + 90*y + 103*z - 2473
x + 90*y + 103*z - 2473 == 0 solve, z → 2473/103 - 90*y/103 - x/103
z(x, y) := 2473/103 - 90*y/103 - x/103
Plane3(x, y) := [x; y; z(x, y)]
P3 := CreateMesh(Plane3, 20, 1, 20, 7, 7, 10)
# [component: inputs Lab, Lac, Lbc, Lmn, P, A, B, C, M, N, P3]
# Задание 4
(x - Xm)/(Xn - Xm) == (y - Ym)/(Yn - Ym) == (z - Zm)/(Zn - Zm) == t
Given
x == Xm + (Xn - Xm)*t
y == Ym + (Yn - Ym)*t
z == Zm + (Zn - Zm)*t
x + 90*y + 103*z - 2473 == 0
Find(x, y, z, t) → [2629/336; -613/168; 9113/336; 1285/672]
Peres(x, y) := [2629/336; -613/168; 9113/336]
Lmn := CreateMesh(LineMN, 0, 2.5, 0, 0)
P3 := CreateMesh(Plane3, 20, 1, 20, -10, 7, 15)
# [component: inputs Lab, Lac, Lbc, Lmn, P, A, B, C, M, N, P3, Peres]
# Задание 5
A5 := [Xa; Ya; Za]
B5 := [Xb; Yb; Zb]
C5 := [Xc; Yc; Zc]
P5 := [Xp; Yp; Zp]
nAB := (B5 - A5)/|B5 - A5| = [0.792982; -0.462573; 0.396491]
Paralell(t, v) := P5 + nAB*t
paralell := CreateMesh(Paralell, -20, 10, 0, 0)
Lmn := CreateMesh(LineMN, 0, 1, 0, 0)
P3 := CreateMesh(Plane3, 20, 1, 20, 7, 7, 10)
# [component: inputs Lab, Lac, Lbc, Lmn, P, A, B, C, M, N, P3, paralell]
# Задание 6
nABC := [1; 90; 103]
Perpend(t, v) := P5 + nABC*t
perpend := CreateMesh(Perpend, -0.02, 0.11, 0, 0)
Given
x == P5[0] + nABC[0]*t
z == P5[2] + nABC[2]*t
y == P5[1] + nABC[1]*t
x + 90*y + 103*z - 2473 == 0
Find(x, y, z, t) → [263987/18710; 18423/1871; 285681/18710; 2047/18710]
R(x, y) := [266689/18903; 186277/18903; 288500/18903]
R6 := [266689/18903; 186277/18903; 288500/18903]
Given
(P5[0] + x)/2 == R6[0]
(P5[1] + y)/2 == R6[1]
(P5[2] + z)/2 == R6[2]
P6' := Find(x, y, z) → [268736/18903; 372554/18903; 501388/18903]
P'(x, y) := [268736/18903; 372554/18903; 501388/18903]
# [component: inputs Lab, Lac, Lbc, Lmn, P, A, B, C, M, N, P3, perpend, R, P']
# Задание 7
x + 90*y + 103*z - 2473
p1 := 1
p2 := 90
p3 := 103
p4 := 2473
p1*(xx - Xp) + p2*(yy - Yp) + p3*(zz - Zp) == 0 solve, zz → 426/103 - 90*yy/103 - xx/103
Plane72(xx, yy) := [xx; yy; 426/103 - 90*yy/103 - xx/103]
P72 := CreateMesh(Plane72, 20, 1, 20, -5., 7, 20)
# [component: inputs Lab, Lac, Lbc, Lmn, P, A, B, C, M, N, P3, P72]
# Задание 8
nPerp := nAB
nPerp[0]*(x8 - P5[0]) + nPerp[1]*(y8 - P5[1]) + nPerp[2]*(z8 - P5[2]) → 0.793*x8 + (-0.463*y8) + 0.396*z8 - 12.688
0.793*x8 + (-0.463*y8) + 0.396*z8 - 12.688 == 0 solve, z8 → 1.169*y8 - 2.003*x8 + 32.04
perpendPlane(x8, y8) := [x8; y8; 1.169*y8 - 2.003*x8 + 32.04]
perpendplane := CreateMesh(perpendPlane, 0, 20, 0, 20, 12, 12)
# [component: inputs Lab, Lac, Lbc, Lmn, P, A, B, C, M, N, P3, perpendplane]
# Задание 9
nABC = [1; 90; 103]
nPerp = [0.792982; -0.462573; 0.396491]
D_ABC := -2473
D_Perp := -12.688
V := nABC×nPerp = [83.3292; 81.2807; -71.831]
P0 := transpose(-[D_ABC, D_Perp]*[nABC*nABC, nABC*nPerp; nABC*nPerp, nPerp*nPerp]^-1) = [0.132175; 12.688]
P0 := P0[0]*nABC + P0[1]*nPerp = [10.1935; 6.02665; 18.6447]
IntersectionLine(t, τ) := P0 + V*t
intersection := CreateMesh(IntersectionLine, -0.1, 0.2, 0, 0)
# [component: inputs P3, perpendplane, intersection]
# Задание 10
D_Perp2 := -(V[0]*P0[0] + V[1]*P0[1] + V[2]*P0[2]) = 2.27374e-13
V[0]*x10 + V[1]*y10 + V[2]*z10 + D_Perp2 → 83.329*x10 + 81.281*y10 + (-71.831*z10) + 2.274*10^-13
83.329*x10 + 81.281*y10 + (-71.831*z10) + 2.274*10^-13 == 0 solve, z10 → 1.16*x10 + 1.132*y10 + 3.166*10^-15
PerpendicularPlane2(x10, y10) := [x10; y10; 1.16*x10 + 1.132*y10 + 3.166*10^-15]
perpendicular2 := CreateMesh(PerpendicularPlane2, 0, 20, 0, 20, 7, 6)
# [component: inputs P3, perpendplane, perpendicular2]
# Задание 11
nABC = [1; 90; 103]
nPerp = [0.792982; -0.462573; 0.396491]
P3 := CreateMesh(Plane3, 40, 5, 20, -10)
n1 := nABC/|nABC| → [sqrt(18710)/18710; 9*sqrt(18710)/1871; 103*sqrt(18710)/18710]
n2 := nPerp/|nPerp| → [0.793; -0.463; 0.396]
bis := n1 + n2 → [
    sqrt(1.871*10^4)/(1.871*10^4) + 0.793;
    9*sqrt(1.871*10^4)/(1.871*10^3) - 0.463;
    103*sqrt(1.871*10^4)/(1.871*10^4) + 0.396
]
Point_x := 0
Point_y := 0  # - начальное приближение для Given
Point_z := 0
Given
Point_x + 90*Point_y + 103*Point_z - 2473 == 0
0.793*Point_x - 0.463*Point_y + 0.396*Point_z - 12.688 == 0
Point_y == 0
Point := Find(Point_x, Point_y, Point_z) → [4.03; 0; 23.971]
bis[0]*(xx - Point[0]) + bis[1]*(yy - Point[1]) + bis[2]*(zz - Point[2]) → (xx - 4.03)*(sqrt(1.871*10^4)/(1.871*10^4) + 0.793) + yy*(9*sqrt(1.871*10^4)/(1.871*10^3) - 0.463) + (zz - 23.971)*(103*sqrt(1.871*10^4)/(1.871*10^4) + 0.396)
(xx - 4.5)*(sqrt(1.871*10^4)/(1.871*10^4) + 0.793) + yy*(9*sqrt(1.871*10^4)/(1.871*10^3) - 0.463) + (zz - 23.966)*(103*sqrt(1.871*10^4)/(1.871*10^4) + 0.396) == 0 solve, zz → 27.1 - 0.17*yy - 0.697*xx
bisector(xx, yy) := [xx; yy; 27.1 - 0.17*yy - 0.697*xx]
b := CreateMesh(bisector, 40, 5, 20, -10)
# [component: inputs P3, perpendplane, b]
