# Пример 5.3
(u - cx)^2/rx^2 - (v - cy)^2/ry^2 == 1 solve, v → [cy + ry*sqrt(cx + rx - u)*sqrt(cx - rx - u)/rx; cy - ry*sqrt(cx + rx - u)*sqrt(cx - rx - u)/rx]
rx := 5
ry := 3
cx := 3
cy := 5
par1(u) := cy - ry*sqrt(cx + rx - u)*sqrt(cx - rx - u)/rx
par2(u) := cy + ry*sqrt(cx + rx - u)*sqrt(cx - rx - u)/rx
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# Пример 5.4
(y - cy)^2 == 2*p*(x - cx) solve, x → (6*p + (y - 5)^2)/(2*p)
p := 5
cx := 3
cy := 5
pan(y) := ((cy - y)^2 + 2*cx*p)/(2*p)
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# Пример 5.8
y(x) := cos(x)
a := 1
y1(x) := d/dx(y(x)) → -sin(x)
y1(a) = -0.841471
k(x) := y(a) + y1(a)*(x - a)
n(x) := y(a) - 1/y1(a)*(x - a)
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# Пример 5.9
f(t) := 2*e^t
y(t) := e^(-t)
t0 := 0
a := f(t0)
a = 2
y(t0) = 1
f1(t) := d/dt(f(t)) → 2*e^t
y1(t) := d/dt(y(t)) → -e^(-t)
k(x) := y(t0) + (x - a)*y1(t0)/f1(t0)
n(x) := y(t0) - f1(t0)/y1(t0)*(x - a)
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