# Задание 2
# Параметрическое представление | Явное представление
x(t) := 6*cos(4*t) + 1
y(t) := 4*sin(4*t) - 5
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6*cos(4*t2) + 1 == x2 solve, t2 → [acos(x2/6 - 1/6)/4; -acos(x2/6 - 1/6)/4]
y2_1(x2) := 4*sin(4*acos(x2/6 - 1/6)/4) - 5 → 4*sqrt(1 - (1/6*x2 - 1/6)^2) - 5
y2_2(x2) := -4*sin(4*acos(x2/6 - 1/6)/4) - 5 → -4*sqrt(1 - (1/6*x2 - 1/6)^2) - 5
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# Задание 3
Ellipse_x0 := 18
Hyper_x0 := 12
Parab_x0 := 112
Ellipse_y0 := 9
Hyper_y0 := 7
Parab_y0 := 14
Ellipse_a := 3
Hyper_a := 14
Parab_p := 7
Ellipse_b := 18
Hyper_b := 8
# Непараметрическое представление
# Эллипс | Гипербола
Парабола
(yp_3 - Parab_y0)^2 == 2*Parab_p*(xp_3 - Parab_x0) solve, yp_3 → [sqrt(14)*sqrt(xp_3 - 112) + 14; 14 - sqrt(14)*sqrt(xp_3 - 112)]
(xe_3 - Ellipse_x0)^2/Ellipse_a^2 + (ye_3 - Ellipse_y0)^2/Ellipse_b^2 == 1 solve, ye_3 → [9 + 6i*sqrt(xe_3 - 15)*sqrt(xe_3 - 21); 9 - 6i*sqrt(xe_3 - 15)*sqrt(xe_3 - 21)]
(xh_3 - Hyper_x0)^2/Hyper_a^2 - (yh_3 - Hyper_y0)^2/Hyper_b^2 == 1 solve, yh_3 → [4*sqrt(xh_3 + 2)*sqrt(xh_3 - 26)/7 + 7; 7 - 4*sqrt(xh_3 + 2)*sqrt(xh_3 - 26)/7]
Ellipse_y1(xe_3) := 9 + 6i*sqrt(xe_3 - 15)*sqrt(xe_3 - 21)
Hyper_y1(xh_3) := 4*sqrt(xh_3 + 2)*sqrt(xh_3 - 26)/7 + 7
Parab_y1(xp_3) := sqrt(14)*sqrt(xp_3 - 112) + 14
Ellipse_y2(xe_3) := 9 - 6i*sqrt(xe_3 - 15)*sqrt(xe_3 - 21)
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Parab_y2(xp_3) := 14 - sqrt(14)*sqrt(xp_3 - 112)
Hyper_y2(xh_3) := 7 - 4*sqrt(xh_3 + 2)*sqrt(xh_3 - 26)/7
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# Параметрическое представление
Hyper_x1(t) := Hyper_a*cosh(t) + Hyper_x0
Parab_x(t) := Parab_p/2*t^2 + Parab_x0
Ellipse_x(t) := Ellipse_a*cos(t) + Ellipse_x0
Hyper_x2(t) := -Hyper_a*cosh(t) + Hyper_x0
Ellipse_y(t) := Ellipse_b*sin(t) + Ellipse_y0
Hyper_y(t) := Hyper_b*sinh(t) + Hyper_y0
Parab_y(t) := Parab_p*t + Parab_y0
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# Задание 4 | Задание 5
Fl_wx := 16
y_5(x) := x^2 - x + 1
Fl_wy := 18
Fl_x(t) := cos(Fl_wx*t)
a_5 := -1
Fl_y(t) := cos(Fl_wy*t)
Point_a5 := y_5(a_5)
BernulliS_r0 := 12
y_p5(x) := d/dx(y_5(x)) → 2*x - 1
BernulliS_r1 := 15
k_5(x) := Point_a5 + y_p5(a_5)*(x - a_5)
BernulliS_x(t) := (BernulliS_r0*e^(BernulliS_r1*t))*cos(t)
BernulliS_y(t) := (BernulliS_r0*e^(BernulliS_r1*t))*sin(t)
n(x) := Point_a5 - 1/y_p5(a_5)*(x - a_5)
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PascalY_a := 17
PascalY_b := 16
PascalY_x(t) := (PascalY_a*cos(t) + PascalY_b)*cos(t)
PascalY_y(t) := (PascalY_a*cos(t) + PascalY_b)*sin(t)
Cicloid_r := 16
Cicloid_x(t) := Cicloid_r*(t - sin(t))
Cicloid_y(t) := Cicloid_r*(1 - cos(t))
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# Задание 6
t0_6 := 1
f_6(t) := ln(1 + t^2)
y_6(t) := atan(t)
yp_6(t) := d/dt(y_6(t)) → 1/(t^2 + 1)
fp_6(t) := d/dt(f_6(t)) → 2*t/(t^2 + 1)
f_6(t0_6) = 0.693147
y_6(t0_6) = 0.785398
k_6(X) := y_6(t0_6) + (X - f_6(t0_6))*yp_6(t0_6)/fp_6(t0_6)
n_6(X) := y_6(t0_6) - (X - f_6(t0_6))*fp_6(t0_6)/yp_6(t0_6)
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# Задание 7
Line_x1 := -18
Ellipse_x0 := 18
Hyper_x0 := 2
Parab_x0 := 1
Line_x2 := 13
Ellipse_y0 := 9
Hyper_y0 := 7
Parab_y0 := 14
Line_y1 := -19
Ellipse_a := 3
Hyper_a := 4
Parab_p := 7
Line_y2 := 18
Ellipse_b := 18
Hyper_b := 8
(xl_7 - Line_x1)/(Line_x2 - Line_x1) == (yl_7 - Line_y1)/(Line_y2 - Line_y1) solve, yl_7 → 37*xl_7/31 + 77/31
Line(xl_7) := 37*xl_7/31 + 77/31
(xe_7 - Ellipse_x0)^2/Ellipse_a^2 + (ye_7 - Ellipse_y0)^2/Ellipse_b^2 == 1 solve, ye_7 → [9 + 6i*sqrt(xe_7 - 15)*sqrt(xe_7 - 21); 9 - 6i*sqrt(xe_7 - 15)*sqrt(xe_7 - 21)]
Ellipse_y1(xe_7) := 9 + 6i*sqrt(xe_7 - 15)*sqrt(xe_7 - 21)
Ellipse_y2(xe_7) := 9 - 6i*sqrt(xe_7 - 15)*sqrt(xe_7 - 21)
(xh_7 - Hyper_x0)^2/Hyper_a^2 - (yh_7 - Hyper_y0)^2/Hyper_b^2 == 1 solve, yh_7 → [2*sqrt(xh_7 + 2)*sqrt(xh_7 - 6) + 7; 7 - 2*sqrt(xh_7 + 2)*sqrt(xh_7 - 6)]
Hyper_y1(xh_7) := 2*sqrt(xh_7 + 2)*sqrt(xh_7 - 6) + 7
Hyper_y2(xh_7) := 7 - 2*sqrt(xh_7 + 2)*sqrt(xh_7 - 6)
(yp_7 - Parab_y0)^2 == 2*Parab_p*(xp_7 - Parab_x0) solve, yp_7 → [sqrt(14)*sqrt(xp_7 - 1) + 14; 14 - sqrt(14)*sqrt(xp_7 - 1)]
Parab_y1(xp_7) := sqrt(14)*sqrt(xp_7 - 1) + 14
Parab_y2(xp_7) := 14 - sqrt(14)*sqrt(xp_7 - 1)
# Точки пересечения:
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Given
f1_7(point) := Line(point) - Hyper_y1(point)
f2_7(point) := Line(point) - Parab_y2(point)
f3_7(point) := Line(point) - Ellipse_y2(point)
f4_7(point) := Parab_y1(point) - Hyper_y1(point)
f5_7(point) := Parab_y2(point) - Ellipse_y1(point)
Root_7 := -5
P1_7 := root(f1_7(Root_7), Root_7) = -4.23868
Root_7 := 3
P2_7 := root(f2_7(Root_7), Root_7) = 4.1154
Root_7 := 10
P3_7 := root(f1_7(Root_7), Root_7) = 6.26534 + 3.56303e-11i
Root_7 := 15
P4_7 := root(f3_7(Root_7), Root_7) = 15.82
Root_7 := 20
P5_7 := root(f3_7(Root_7), Root_7) = 19.2253
Root_7 := 12
P6_7 := root(f4_7(Root_7), Root_7) = 12.6689
Root_7 := 15
P7_7 := root(f5_7(Root_7), Root_7) = 15.4224
Root_7 := 19
P8_7 := root(f5_7(Root_7), Root_7) = 20.3156
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# Задание 8
y1_8(x_8) := x_8 + e^(-x_8/2)
y2_8(x_8) := 5*tanh(x_8)
Given
f_8(point) := y2_8(point) - y1_8(point)
Root_8 := 0
P1_8 := root(f_8(Root_8), Root_8) = 0.227907
Root_8 := 5
P2_8 := root(f_8(Root_8), Root_8) = 4.91376
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# Задание 9
CircleA_x_9 := 14
PointA_x_9 := 23
PointB_x_9 := 16
R_9 := 4
CircleA_y_9 := 12
PointA_y_9 := 25
PointB_y_9 := 18
CircleA_R_9 := 10
# Первая часть
(xc_9 - CircleA_x_9)^2 + (yc_9 - CircleA_y_9)^2 == CircleA_R_9^2 solve, yc_9 → [12 + sqrt(xc_9 - 4)*sqrt(xc_9 - 24)*1i; 12 - sqrt(xc_9 - 4)*sqrt(xc_9 - 24)*1i]
CircleA_y1(xc_9) := 12 + sqrt(xc_9 - 4)*sqrt(xc_9 - 24)*1i
CircleA_y2(xc_9) := 12 - sqrt(xc_9 - 4)*sqrt(xc_9 - 24)*1i
# Вспомогательные построения:
Circle2_x := (CircleA_x_9 + PointA_x_9)/2 = 18.5
Circle2_y := (CircleA_y_9 + PointA_y_9)/2 = 18.5
Circle2_r := sqrt((CircleA_x_9 - Circle2_x)^2 + (CircleA_y_9 - Circle2_y)^2) = 7.90569
(xc2_9 - Circle2_x)^2 + (yc2_9 - Circle2_y)^2 == Circle2_r^2 solve, yc2_9 → [
    18.5 - 4.472i*10^-10*sqrt(5*10^18*xc2_9^2 - 1.85*10^20*xc2_9 + 1.399*10^21);
    18.5 + 4.472i*10^-10*sqrt(5*10^18*xc2_9^2 - 1.85*10^20*xc2_9 + 1.399*10^21)
]
Circle2_y1(xc2_9) := 18.5 - 4.472i*10^-10*sqrt(5*10^18*xc2_9^2 - 1.85*10^20*xc2_9 + 1.399*10^21)
Circle2_y2(xc2_9) := 18.5 + 4.472i*10^-10*sqrt(5*10^18*xc2_9^2 - 1.85*10^20*xc2_9 + 1.399*10^21)
# Точка сопряжения:
Given
f1_9(point) := CircleA_y2(point) - Circle2_y1(point)
Root1_9 := 11
PointS1_9 := root(f1_9(Root1_9), Root1_9) = 11.2353
# Линия сопряжения окружности A и отрезка прямой, проходящей через точку А:
(xs_9 - PointA_x_9)/(PointS1_9 - PointA_x_9) == (ys_9 - PointA_y_9)/(CircleA_y2(PointS1_9) - PointA_y_9) solve, ys_9 → 0.288*xs_9 + 18.373
LineS_9(xs_9) := 0.288*xs_9 + 18.373
LineS_x_9 := PointS1_9, PointS1_9 + 0.01 .. PointA_x_9
xc1_9 := 4, 4 + 0.01 .. PointS1_9
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# Вторая часть
(xc_9 - CircleA_x_9)^2 + (yc_9 - CircleA_y_9)^2 == CircleA_R_9^2 solve, yc_9 → [12 + sqrt(xc_9 - 4)*sqrt(xc_9 - 24)*1i; 12 - sqrt(xc_9 - 4)*sqrt(xc_9 - 24)*1i]
CircleA_y1(xc_9) := 12 + sqrt(xc_9 - 4)*sqrt(xc_9 - 24)*1i
CircleA_y2(xc_9) := 12 - sqrt(xc_9 - 4)*sqrt(xc_9 - 24)*1i
(xl_9 - PointA_x_9)/(PointB_x_9 - PointA_x_9) == (yl_9 - PointA_y_9)/(PointB_y_9 - PointA_y_9) solve, yl_9 → xl_9 + 2
LineAB(xl_9) := xl_9 + 2
# Вспомогательные построения:
PerpAB(X) := -1*(X - PointA_x_9) + PointA_y_9
(xc_9 - CircleA_x_9)^2 + (yc_9 - CircleA_y_9)^2 == (CircleA_R_9 + R_9)^2 solve, yc_9 → [12 + sqrt(xc_9)*sqrt(xc_9 - 28)*1i; 12 - sqrt(xc_9)*sqrt(xc_9 - 28)*1i]
sqrt((Point_x_9 - PointA_x_9)^2 + (Point_y_9 - PointA_y_9)^2) == R_9
Point_y_9 == -1*(Point_x_9 - PointA_x_9) + PointA_y_9
CircleA1_y1(xc_9) := 12 + sqrt(xc_9)*sqrt(xc_9 - 28)*1i
CircleA1_y2(xc_9) := 12 - sqrt(xc_9)*sqrt(xc_9 - 28)*1i
Point_x_9 := 23 - 2*sqrt(2)
Find(Point_x_9, Point_y_9) → [23 - 2*sqrt(2), 2*sqrt(2) + 23; 2*sqrt(2) + 25, 25 - 2*sqrt(2)]
Point_y_9 := 2*sqrt(2) + 25
ParallelAB(xl_9) := (xl_9 - Point_x_9) + Point_y_9 → xl_9 + 4*sqrt(2) + 2
Given
f2_9(point) := CircleA1_y2(point) - ParallelAB(point)
Root2_9 := 17
PointC2_9 := root(f2_9(Root2_9), Root2_9) = 17.8137
Circle2_x_9 := 17.814
Circle2_y_9 := ParallelAB(Circle2_x_9)
(xc_9 - Circle2_x_9)^2 + (yc_9 - Circle2_y_9)^2 == R_9^2 solve, yc_9 → [
    25.471 - 0.002i*sqrt(500*xc_9 - 10907)*sqrt(500*xc_9 - 6907);
    25.471 + 0.002i*sqrt(500*xc_9 - 10907)*sqrt(500*xc_9 - 6907)
]
Circle2_y1(xc_9) := 25.471 - 0.002i*sqrt(500*xc_9 - 10907)*sqrt(500*xc_9 - 6907)
Circle2_y2(xc_9) := 25.471 + 0.002i*sqrt(500*xc_9 - 10907)*sqrt(500*xc_9 - 6907)
# Точки сопряжения:
Given
f3_9(point) := CircleA_y2(point) - Circle2_y2(point)
f4_9(point) := ParallelAB(point) - Circle2_y1(point)
Root2_9 := 17
PointS1_9 := root(f3_9(Root2_9), Root2_9) = 16.7242 + 0.0522276i
PointS1_9 := 16.724
Root2_9 := 21
PointS2_9 := root(f4_9(Root2_9), Root2_9) = 20.6425
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x_circle := 0, 0.01 .. PointS1_9
x_circleS := PointS1_9, PointS1_9 + 0.01 .. PointS2_9
x_line := PointS2_9, PointS2_9 + 0.01 .. 35
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