# Пример 6.1.
m := ORIGIN
n := 10
i := m .. n
j := i
x[i] := i
y[i] := sin(x[i])
Lagr(t) := y[m]*product((t - x[j])/(x[m] - x[j]), j = m + 1 .. n) + y[n]*product((t - x[j])/(x[n] - x[j]), j = m .. n - 1) + sum(y[i]*product((t - x[j])/(x[i] - x[j]), j = m .. i - 1)*product((t - x[j])/(x[i] - x[j]), j = i + 1 .. n), i = m + 1 .. n - 1)
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# Пример 6.2.
m := ORIGIN
n := 10
i := m .. n
j := i
x[i] := i
y[i] := x[i]^2
Lgr(t) :=
    lag ← 0
    for i ∈ m .. n
        p ← 1
        for j ∈ m .. n
            p ← p*(t - x[j])/(x[i] - x[j]) if i ≠ j
        lag ← lag + y[i]*p
    lag
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# Пример 6.3.
m := ORIGIN
n := 10
i := m .. n
j := i
x[i] := i
y[i] := sin(x[i])
# Определение координат точек:
T[i] := i*2*π/n
X[i] := cos(T[i])
Y[i] := sin(T[i])
k := 0 .. 200
p[k] := T[0] + (T[n] - T[0])*k/200
# Формула полинома Лагранжа:
L(t, x, y) := y[m]*product((t - x[j])/(x[m] - x[j]), j = m + 1 .. n) + y[n]*product((t - x[j])/(x[n] - x[j]), j = m .. n - 1) + sum(y[i]*product((t - x[j])/(x[i] - x[j]), j = m .. i - 1)*product((t - x[j])/(x[i] - x[j]), j = i + 1 .. n), i = m + 1 .. n - 1)
Lx(p) := L(p, T, X)
Ly(p) := L(p, T, Y)
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# Пример 6.4.
