# Вариант 14
# Задание 2
y(x) := x/(x^2 - 4)
x1 := 3
x2 := 6
points_count := 12
h := (x2 - x1)/(points_count - 1) = 0.272727
points := x1, x1 + h .. x2
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# Задание 3
ORIGIN := 1
n := points_count
i := 1 .. n
X[i] := x1 + (i - 1)*h
Y[i] := y(X[i])
Lagrange(t) :=
    sum ← 0
    for i ∈ 1 .. n
        L[i] ← 1
        for j ∈ 1 .. n
            L[i] ← L[i]*(t - X[j])/(X[i] - X[j]) if j ≠ i
        sum ← sum + L[i]*Y[i]
    sum
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# Задание 4
# Эпициклоида
ORIGIN := 0
r0 := 14
r1 := 9
Epicycloid_fx(t) := (r0 + r1)*cos(t) - r1*cos((r0 + r1)/r1*t)
Epicycloid_fy(t) := (r0 + r1)*sin(t) - r1*sin((r0 + r1)/r1*t)
k := points_count
i := -k .. k
points[i + k] := i*2*π/k
Epicycloid_x[i + k] := (r0 + r1)*cos(points[i + k]) - r1*cos((r0 + r1)/r1*points[i + k])
Epicycloid_y[i + k] := (r0 + r1)*sin(points[i + k]) - r1*sin((r0 + r1)/r1*points[i + k])
CurveLagrange(t, points, func_values) :=
    k ← length(points)
    sum ← 0
    for i ∈ 0 .. k - 1
        L ← 1
        for j ∈ 0 .. k - 1
            L ← L*(t - points[j])/(points[i] - points[j]) if j ≠ i
        sum ← sum + L*func_values[i]
    sum
Lagrange_x(t) := CurveLagrange(t, points, Epicycloid_x)
Lagrange_y(t) := CurveLagrange(t, points, Epicycloid_y)
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# Задание 5
ORIGIN := 0
y(x) := x/(x^2 - 4)
y'(x) := d/dx(y(x)) → 1/(x^2 - 4) - 2*x^2/(x^2 - 4)^2
x1 := 3
x2 := 6
k := points_count
i := 0 .. k
X[i] := x1 + i*(x2 - x1)/k
Y[i] := y(X[i])
Y'[i] := y'(X[i])
# Базисные функции
a0(u) := 1 - 3*u^2 + 2*u^3
a1(u) := 3*u^2 - 2*u^3
b0(u) := u - 2*u^2 + u^3
b1(u) := -u^2 + u^3
Ermite(t) :=
    result ← 0
    for i ∈ 0 .. k - 1
        h ← X[i + 1] - X[i]
        u ← (t - X[i])/h
        result ← Y[i]*a0(u) + Y[i + 1]*a1(u) + Y'[i]*b0(u)*h + Y'[i + 1]*b1(u)*h if X[i] ≤ t < X[i + 1]
    result
h := (x2 - x1)/(k - 1) = 0.272727
points := x1, x1 + h .. x2
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# Задание 6
ORIGIN := 0
y(x) := x/(x^2 - 4)
x1 := 3
x2 := 6
k := points_count
i := 0 .. k - 1
X[i] := x1 + i*(x2 - x1)/(k - 1)
Y[i] := y(X[i])
Polinom3(t, points) := (1 - t)^3*points[0] + 3*t*(1 - t)^2*points[1] + 3*t^2*(1 - t)*points[2] + t^3*points[3]
indexes := 0 .. k - 3
Bezie :=
    counter ← 0
    for j ∈ indexes
        for k ∈ j .. j + 3
            current_x[k - j] ← X[k]
            current_y[k - j] ← Y[k]
        for t ∈ 0, 0.1 .. 1
            result[counter, 0] ← Polinom3(t, current_x)
            result[counter, 1] ← Polinom3(t, current_y)
            counter ← counter + 1
    result
index := 0 .. 100
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# Задание 7
ORIGIN := 0
k := points_count
points := [3; 3; 3.273; 3.545; 3.818; 4.091; 4.364; 4.636; 4.909; 5.182; 5.455; 5.727; 6]
X[i] := points[i]
Y[i] := y(X[i])
ab0(arr, i) := (arr[i - 1] + 4*arr[i] + arr[i + 1])/6
ab1(arr, i) := (arr[i + 1] - arr[i - 1])/2
ab2(arr, i) := (arr[i - 1] - 2*arr[i] + arr[i + 1])/2
ab3(arr, i) := (-arr[i - 1] + 3*arr[i] - 3*arr[i + 1] + arr[i + 2])/6
BSpline :=
    for index ∈ 1 .. k - 2
        a0 ← ab0(X, index)
        a1 ← ab1(X, index)
        a2 ← ab2(X, index)
        a3 ← ab3(X, index)
        b0 ← ab0(Y, index)
        b1 ← ab1(Y, index)
        b2 ← ab2(Y, index)
        b3 ← ab3(Y, index)
        for t ∈ 0 .. 1
            x(t) ← a3*t^3 + a2*t^2 + a1*t + a0
            y(t) ← b3*t^3 + b2*t^2 + b1*t + b0
        result[index] ← [x(t); y(t)]
    result
index := 0 .. k - 2
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