# Пример 7.4
ORIGIN := 0
M := 50
i := 0 .. M
T[i] := i*8*π/M
k := 1
a0(v) := 1 - 3*v^2 + 2*v^3
b0(v) := v - 2*v^2 + v^3
a1(v) := 3*v^2 - 2*v^3
b1(v) := -v^2 + v^3
x(t) := cos(t)
y(t) := sin(t)
z(t) := k*t
px(t) := d/dt(x(t))
py(t) := d/dt(y(t))
pz(t) := d/dt(z(t))
X[i] := x(T[i])
Y[i] := y(T[i])
Z[i] := z(T[i])
pX[i] := px(T[i])
pY[i] := py(T[i])
pZ[i] := pz(T[i])
Ermit(t, T, Δ, dΔ) :=
    E ← 0
    for i ∈ 0 .. M - 1
        if T[i] ≤ t ≤ T[i + 1]
            l[i] ← T[i + 1] - T[i]
            g ← (t - T[i])/l[i]
            E ← Δ[i]*a0(g) + Δ[i + 1]*a1(g) + dΔ[i]*b0(g)*l[i] + dΔ[i + 1]*b1(g)*l[i]
    E
ErX(t) := Ermit(t, T, X, pX)
ErY(t) := Ermit(t, T, Y, pY)
ErZ(t) := Ermit(t, T, Z, pZ)
F(t, u) := [ErX(t); ErY(t); ErZ(t)]
# [component: inputs CreateMesh(F, 0, 8*π, 0, 0, 100)]
# Пример 7.13
N := 25
i := 0 .. N
R := 1
j := 0 .. N
φ[i] := i*2*π/N
ζ[j] := j*2*π/N
Sphere(ζ, φ) := [R*sin(ζ)*cos(φ); R*sin(ζ)*sin(φ); R*cos(ζ)]
H := CreateMesh(Sphere, 0, π, 0, π, 10, 10)
# [component: inputs H]
# Пример 7.15
H := 6
h := 0 .. H
R := 4
φ := 0 .. 2*π
Cyl(φ, h) := [R*cos(φ); R*sin(φ); h]
P1 := CreateMesh(Cyl, 0, 2*π/3, 6, 20, 10)
# [component: inputs P1]
# Пример 7.18
H := 4
h := 0 .. H
φ := π/3
ζ := 0 .. 2*π
R := tan(φ)*H
Con(ζ, h) := [R*(H - h)/H*cos(ζ); R*(H - h)/H*sin(ζ); h]
P2 := CreateMesh(Con, 0, π, 0, 4, 20, 10)
# [component: inputs P2]
