# Вариант 14
# Задание 2
M := 20
i := 0 .. M
T[i] := 2 + i*(100 - 2)/M  # (Сделать диапазон значений от 2 до 100 из 20ти чисел)
a0(v) := 1 - 3*v^2 + 2*v^3
b0(v) := v - 2*v^2 + v^3
a1(v) := 3*v^2 - 2*v^3
b1(v) := -v^2 + v^3
y(t) := t^3/(1 - t^2)
x(t) := t^2/(1 - t)
z(t) := 2/(4*t + 1)
px(t) := d/dt(x(t)) → t^2/(t - 1)^2 - 2*t/(t - 1)
py(t) := d/dt(y(t)) → 2*t^4/(t^2 - 1)^2 - 3*t^2/(t^2 - 1)
pz(t) := d/dt(z(t)) → -8/(4*t + 1)^2
X[i] := x(T[i])
Y[i] := y(T[i])
Z[i] := z(T[i])  # (Вычисляются значения функций в точках t)
pX[i] := px(T[i])
pY[i] := py(T[i])
pZ[i] := pz(T[i])
Ermit(t, T, Δ, dΔ) :=
    E ← 0
    for i ∈ 0 .. M - 1
        if T[i] ≤ t ≤ T[i + 1]
            l[i] ← T[i + 1] - T[i]
            g ← (t - T[i])/l[i]
            E ← Δ[i]*a0(g) + Δ[i + 1]*a1(g) + dΔ[i]*b0(g)*l[i] + dΔ[i + 1]*b1(g)*l[i]
    E
# (Из примера)
ErX(t) := Ermit(t, T, X, pX)
ErY(t) := Ermit(t, T, Y, pY)
ErZ(t) := Ermit(t, T, Z, pZ)
Curve(t, u) := [ErX(t); ErY(t); ErZ(t)]
CurveLine := CreateMesh(Curve, 2, 100, 0, 0, 20)
# [component: inputs CurveLine]
# Задание 3
A := -10
G := 12
B := 8
H := 11
C := -3
J := 0
E := 0
K := -13
Q := 18
D := 0
A*x^2 + B*y^2 + C*z^2 + 2*E*x*y + 2*Q*x*z + 2*G*y*z + 2*H*x + 2*J*y + 2*K*z + D == 0
f(x, y, z) := A*x^2 + B*y^2 + C*z^2 + 2*E*x*y + 2*Q*x*z + 2*G*y*z + 2*H*x + 2*J*y + 2*K*z + D → 36*x*z - 10*x^2 + 22*x + 8*y^2 + 24*y*z - 3*z^2 - 26*z
# Инварианты:
I[1] := A + B + C = -5
I[2] := det([A, E; E, B]) + det([B, G; G, C]) + det([A, Q; Q, C]) = -542
I[3] := det([A, E, Q; E, B, G; Q, G, C]) = -912
I[4] := det([A, E, Q, H; E, B, G, J; Q, G, C, K; H, J, K, D]) = -7336
# (Все из методички)
I'[2] := det([A, H; H, D]) + det([B, J; J, D]) + det([C, K; K, D]) = -290
I'[3] := det([B, G, J; G, C, K; J, K, D]) + det([A, Q, H; Q, C, K; H, K, D]) + det([A, E, H; E, B, J; H, J, D]) = -5415
# В изначальных данных поверхность получилась мнимая или вырожденная, коэффициентs были изменены (у A изменен знак на противоположный)
# I_3 =/= 0, I_1I_3 > 0, I_2 < 0, I_4 < 0 => поверхность - двухполосный гиперболоид
# Задание 4
# Параболический цилиндр
a_4 := 2
b_4 := 5
c_4 := 2
nτ := 16
nθ := 16
j := 0 .. nτ
k := 0 .. nθ
τ[j] := 2*j/nτ - 1
θ[k] := 1*π*k/nθ
ParabCylinder(τ, θ) := [τ*a_4; 2*b_4*(θ*π^-1 - 0.5); τ^2*c_4]
[X_4[j, k], Y_4[j, k], Z_4[j, k]] := transpose(ParabCylinder(τ[j], θ[k]))
# [component: inputs (Z_4, X_4, Y_4)]
# Задание 5
# Цилиндрическая поверхность
H := 25
R := 9
x1 := 12
Xa := 1
Xb := 14
Xc := 1
y1 := 0
Ya := 3
Yb := 12
Yc := 16
z1 := 15
Za := 17
Zb := 17
Zc := 15
φ := 260*π/180 = 4.53786
# Сначала построим классическую поверхность по заданным параметрам
Cylinder(φ, h) := [R*cos(φ) + x1; R*sin(φ) + y1; h + z1]
BasicCylinder := CreateMesh(Cylinder, 0, 2*π, 0, 25, 20, 10)
CenterPoint(u, v) := [x1; y1; z1]
# [component: inputs [(BasicCylinder, CenterPoint), □]]
# Далее сделаем развертку цилиндра на заданный угол φ
EditCylinder := CreateMesh(Cylinder, 0, 2*π - φ, 0, H, 20, 10)
# [component: inputs EditCylinder, CenterPoint]
# Теперь наклоним цилиндр так, чтобы его основание было параллельно плоскости P (заданной точками A, B, C) и центр оставался в точке (x1,y1,z1)
det([Xa, Xb, Xc; Ya, Yb, Yc; Za, Zb, Zc]) = 2933
det([x_5 - Xa, y_5 - Ya, z_5 - Za; Xb - Xa, Yb - Ya, Zb - Za; Xc - Xa, Yc - Ya, Zc - Za]) → 26*y_5 - 18*x_5 + 169*z_5 - 2933
26*y_5 - 18*x_5 + 169*z_5 - 2933 == 0 solve, z_5 → 18*x_5/169 - 2*y_5/13 + 2933/169
PlaneABC(x, y) := [x; y; 18*x/169 - 2*y/13 + 2933/169]
P := CreateMesh(PlaneABC, 0, 21, -10, 10, 10, 6)
# (Найдем параллельную плоскость)
26*y1 - 18*x1 + 169*z1 + D' == 0 solve, D' → -2319
26*y_5 - 18*x_5 + 169*z_5 - 2319 == 0 solve, z_5 → 18*x_5/169 - 2*y_5/13 + 2319/169
ParallelPlaneABC(x, y) := [x; y; 18*x/169 - 2*y/13 + 2319/169]
ParallelP := CreateMesh(ParallelPlaneABC, 0, 21, -10, 10, 10, 6)
# (Уравнения для x и y неизменны; так как плоскость основания теперь наклонена - точки должны лежать в этой плоскости + подниматься на нужную высоту h)
ScaledCylinder(φ, h) := [R*cos(φ) + x1; R*sin(φ) + y1; (18*(R*cos(φ) + x1) - 26*(R*sin(φ) + y1) + 2319)/169 + h]
FinalCylinder := CreateMesh(ScaledCylinder, 0, 2*π - φ, 0, H, 20, 10)
# [component: inputs FinalCylinder, CenterPoint, P, ParallelP]
