# Пример 8.8
n := 4
X := [3; 5; 7; 5; 3]
Y := [12; 11; 12; 9; 12]
x01 := sum(X[i], i = 1 .. n)/n = 5
y01 := sum(Y[i], i = 1 .. n)/n = 11
T1 := [1, 0, 0; 0, 1, 0; -5, -11, 1]
XY := [3, 12, 1; 5, 11, 1; 7, 12, 1; 5, 9, 1]
R := XY*T1 = [-2, 1, 1; 0, 0, 1; 2, 1, 1; 0, -2, 1]
R180 := [-1, 0, 0; 0, -1, 0; 0, 0, 1]
RR := R*R180 = [2, -1, 1; 0, 0, 1; -2, -1, 1; 0, 2, 1]
S := [2, 0, 0; 0, 2, 0; 0, 0, 1]
RS := RR*S = [4, -2, 1; 0, 0, 1; -4, -2, 1; 0, 4, 1]
T := [1, 0, 0; 0, 1, 0; 12, 2, 1]
RT := RS*T = [16, 0, 1; 12, 2, 1; 8, 0, 1; 12, 6, 1]
XRT := [16; 12; 8; 12; 16]
YRT := [0; 2; 0; 6; 0]
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