# Вариант 14
# Задание 2
x1 := 2
x2 := 4
x3 := 10
x4 := 15
x5 := 9
y1 := 10
y2 := 4
y3 := 9
y4 := 11
y5 := 15
P1 := [x1; y1]
P2 := [x2; y2]
P3 := [x3; y3]
P4 := [x4; y4]
P5 := [x5; y5]
Polygon_X := transpose([x1, x2, x3, x4, x5, x1])
Polygon_Y := transpose([y1, y2, y3, y4, y5, y1])
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# Полуокружность вместо стороны P1P5
center_P1P5 := (P1 + P5)/2 = [5.5; 12.5]
R := sqrt((x5 - x1)^2 + (y5 - y1)^2)/2 = 4.30116
cor := atan2(x5 - x1, y5 - y1) = 0.620249
N := 11
i := 0 .. N
t[i] := i*π/N
circle_x[i] := center_P1P5[0] + R*cos(cor + t[i])
circle_y[i] := center_P1P5[1] + R*sin(cor + t[i])
circle_x = [9; 8.15389; 7.09279; 5.90264; 4.67987; 3.52355; 2.52734; 1.77197; 1.31861; 1.20401; 1.43744; 2]
circle_y = [15; 15.8848; 16.4954; 16.7823; 16.7222; 16.3202; 15.6086; 14.6452; 13.508; 12.2891; 11.0873; 10]
Polygon_X2 := stack(x1, x2, x3, x4, circle_x)
Polygon_Y2 := stack(y1, y2, y3, y4, circle_y)
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# Задание 3
Polygon_3 := [
    x1, y1, 1;
    x2, y2, 1;
    x3, y3, 1;
    x4, y4, 1;
    x5, y5, 1;
    circle_x[1], circle_y[1], 1;
    circle_x[2], circle_y[2], 1;
    circle_x[3], circle_y[3], 1;
    circle_x[4], circle_y[4], 1;
    circle_x[5], circle_y[5], 1;
    circle_x[6], circle_y[6], 1;
    circle_x[7], circle_y[7], 1;
    circle_x[8], circle_y[8], 1;
    circle_x[9], circle_y[9], 1;
    circle_x[10], circle_y[10], 1;
    x1, y1, 1
] = [
    2, 10, 1;
    4, 4, 1;
    10, 9, 1;
    15, 11, 1;
    9, 15, 1;
    8.15389, 15.8848, 1;
    7.09279, 16.4954, 1;
    5.90264, 16.7823, 1;
    4.67987, 16.7222, 1;
    3.52355, 16.3202, 1;
    2.52734, 15.6086, 1;
    1.77197, 14.6452, 1;
    1.31861, 13.508, 1;
    1.20401, 12.2891, 1;
    1.43744, 11.0873, 1;
    2, 10, 1
]
# a)
X1 := 1
X2 := 6
Y1 := -2
Y2 := 7
Line(x) := (Y2 - Y1)/(X2 - X1)*(x - X1) + Y1
α := atan2(Y2 - Y1, X2 - X1)
T1 := [1, 0, 0; 0, 1, 0; -X1, -Y1, 1]
T2 := [1, 0, 0; 0, 1, 0; X1, Y1, 1]
R1 := [cos(α), sin(α), 0; -sin(α), cos(α), 0; 0, 0, 1]
R2 := [cos(α), -sin(α), 0; sin(α), cos(α), 0; 0, 0, 1]
M := [-1, 0, 0; 0, 1, 0; 0, 0, 1]
Polygon_refl_line := Polygon_3*T1*R1*M*R2*T2
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Polygon_refl_Y := Polygon_refl_line*M
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# б)
X1 := 1
φ := 35*π/180
Y1 := -2
T1 := [1, 0, 0; 0, 1, 0; -X1, -Y1, 1]
T2 := [1, 0, 0; 0, 1, 0; X1, Y1, 1]
R := [cos(φ), sin(φ), 0; -sin(φ), cos(φ), 0; 0, 0, 1]
Polygon_rotate_P1 := Polygon_refl_Y*T1*R*T2
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# в)
Sx := 0.5
Sy := 2.0
S := [Sx, 0, 0; 0, Sy, 0; 0, 0, 1]
Polygon_scale := Polygon_rotate_P1*S
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# г)
Tx := 15
Ty := -25
T := [1, 0, 0; 0, 1, 0; Tx, Ty, 1]
Polygon_moved := Polygon_scale*T
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# Задание 4
X := 21
Tx := -25
Sx := 1.2
φ := -π/6
Y := 13
Ty := 15
Sy := 2.2
T1 := [1, 0, 0; 0, 1, 0; -X, -Y, 1]
T2 := [1, 0, 0; 0, 1, 0; X, Y, 1]
T := [1, 0, 0; 0, 1, 0; Tx, Ty, 1]
R := [cos(φ), sin(φ), 0; -sin(φ), cos(φ), 0; 0, 0, 1]
S := [Sx, 0, 0; 0, Sy, 0; 0, 0, 1]
TotalMatrix := T1*R*T2*T*S = [1.03923, -1.1, 0; 0.6, 1.90526, 0; -34.4238, 59.9317, 1]
ChangedPolygon := Polygon_3*TotalMatrix
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# Задание 5
n := 20
t(FRAME) := FRAME/n
I := [1, 0, 0; 0, 1, 0; 0, 0, 1]
AnimMatrix(FRAME) := I + t(FRAME)*(TotalMatrix - I)
P_anim(FRAME) := Polygon_3*AnimMatrix(FRAME)
X_anim(FRAME) := P_anim(FRAME)[:, 0]
Y_anim(FRAME) := P_anim(FRAME)[:, 1]
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